units lj
atom_style atomic
boundary p p p
lattice sc 0.8442
region box block 0 20 0 20 0 20
create_box 1 box
create_atoms 1 box
mass 1 1.0
velocity all create 1.44 87287
pair_style lj/cut 2.5
pair_coeff 1 1 1.0 1.0 2.5
neighbor 0.3 bin
neigh_modify every 1 delay 0 check yes
fix 1 all nve
fix 2 all langevin 1.0 1.0 1.0 48279
thermo 10
thermo_modify flush yes
run 200000000
